_XTAL_FREQ := 48 MHz  # - тактовая частота процессора
T_cy := 1/_XTAL_FREQ*4  # - длительность одного цикла инструкции
T_delay := 1 μs  # - необходимое время задержки
N_Tcy := T_delay/T_cy = 12  # - количество "холостых" инструкций, которые нужно выполнить процессору, чтобы получить заданный delay
